<?xml version="1.0" ?>
<!-- $Id$ -->

<!--

  References :
  ==========

  - NACA Report 378

-->

<propeller name="prop_RAF-6">

  <ixx> 20.405 </ixx>
  <diameter unit="IN"> 174.0 </diameter>
  <numblades> 3 </numblades>
  <gearratio> 2.22 </gearratio>
  <minrpm> 394 </minrpm>
  <maxrpm> 1260 </maxrpm>
  <minpitch> 11 </minpitch>
  <maxpitch> 27 </maxpitch>
<ct_factor>3.0</ct_factor>
<cp_factor>3.0</cp_factor>
  <table name="C_THRUST" type="internal">
    <tableData>
	    	11    	15    	19    	23    	27
	0.00	0.0763	0.0823	0.1002	0.1107	0.1091
	0.10	0.0703	0.0805	0.0975	0.1083	0.1076
	0.15	0.0643	0.0787	0.0948	0.1059	0.1061
	0.20	0.0580	0.0768	0.0918	0.1031	0.1051
	0.25	0.0514	0.0740	0.0881	0.1000	0.1040
	0.30	0.0449	0.0692	0.0842	0.0970	0.1032
	0.35	0.0381	0.0637	0.0800	0.0938	0.1025
	0.40	0.0311	0.0580	0.0753	0.0905	0.1014
	0.45	0.0235	0.0503	0.0702	0.0870	0.0997
	0.50	0.0155	0.0426	0.0646	0.0837	0.0971
	0.55	0.0077	0.0345	0.0581	0.0795	0.0940
	0.60	-0.0001	0.0265	0.0515	0.0746	0.0905
	0.65	-0.0079	0.0186	0.0445	0.0690	0.0865
	0.70	-0.0157	0.0107	0.0373	0.0625	0.0822
	0.75	-0.0235	0.0027	0.0301	0.0558	0.0777
	0.80	-0.0313	-0.0053	0.0228	0.0494	0.0722
	0.85	-0.0391	-0.0133	0.0150	0.0422	0.0663
	0.90	-0.0469	-0.0213	0.0072	0.0350	0.0600
	0.95	-0.0547	-0.0293	-0.0006	0.0280	0.0532
	1.00	-0.0625	-0.0373	-0.0084	0.0204	0.0468
	1.05	-0.0703	-0.0453	-0.0162	0.0130	0.0403
	1.10	-0.0781	-0.0533	-0.0240	0.0055	0.0341
	1.15	-0.0859	-0.0613	-0.0318	-0.0020	0.0280
	1.20	-0.0937	-0.0693	-0.0396	-0.0095	0.0216
	1.25	-0.1015	-0.0773	-0.0474	-0.0170	0.0150
	1.30	-0.1093	-0.0853	-0.0552	-0.0245	0.0080
    </tableData>
  </table>

  <table name="C_POWER" type="internal">
    <tableData>
	    	11    	15    	19    	23    	27
	0.00	0.0276	0.0394	0.0638	0.0898	0.1097
	0.10	0.0269	0.0397	0.0609	0.0873	0.1076
	0.15	0.0262	0.0400	0.0580	0.0848	0.1055
	0.20	0.0249	0.0399	0.0551	0.0825	0.1026
	0.25	0.0235	0.0394	0.0535	0.0791	0.1003
	0.30	0.0220	0.0386	0.0515	0.0761	0.0995
	0.35	0.0200	0.0374	0.0506	0.0734	0.0984
	0.40	0.0179	0.0358	0.0497	0.0710	0.0970
	0.45	0.0152	0.0326	0.0485	0.0682	0.0953
	0.50	0.0122	0.0292	0.0468	0.0661	0.0922
	0.55	0.0091	0.0252	0.0440	0.0642	0.0889
	0.60	0.0091	0.0212	0.0409	0.0626	0.0860
	0.65	0.0091	0.0169	0.0372	0.0602	0.0829
	0.70	0.0091	0.0123	0.0331	0.0568	0.0805
	0.75	0.0091	0.0077	0.0284	0.0532	0.0780
	0.80	0.0091	0.0077	0.0234	0.0489	0.0751
	0.85	0.0091	0.0077	0.0182	0.0441	0.0714
	0.90	0.0091	0.0077	0.0130	0.0390	0.0672
	0.95	0.0091	0.0077	0.0130	0.0336	0.0623
	1.00	0.0091	0.0077	0.0130	0.0278	0.0574
	1.05	0.0091	0.0077	0.0130	0.0220	0.0518
	1.10	0.0091	0.0077	0.0130	0.0162	0.0464
	1.15	0.0091	0.0077	0.0130	0.0162	0.0409
	1.20	0.0091	0.0077	0.0130	0.0162	0.0349
	1.25	0.0091	0.0077	0.0130	0.0162	0.0281
	1.30	0.0091	0.0077	0.0130	0.0162	0.0216
    </tableData>
  </table>
</propeller>
